# a)
(s + ω_1)/(s + ω_2)
# Definition på billineære transformation: (approksimation til digital domæne)
s == 2/T*((1 - z^-1)/(1 + z^-1))  # <- T = sampling periode.
# Substitution:
s/(s + ω_2) == 2/T*((1 - z^-1)/(1 + z^-1))/(2/T*((1 - z^-1)/(1 + z^-1)) + ω_2)  # og:
ω_1/(s + ω_2) == ω_1/(2/T*((1 - z^-1)/(1 + z^-1)) + ω_2)
# Samlet:
(s + ω_1)/(s + ω_2) == (2/T*((1 - z^-1)/(1 + z^-1)) + ω_1)/(2/T*((1 - z^-1)/(1 + z^-1)) + ω_2)  # ->
(2/T*((1 - z^-1)/(1 + z^-1)) + ω_1)/(2/T*((1 - z^-1)/(1 + z^-1)) + ω_2) simplify → (2*z + ω_1*T + ω_1*T*z - 2)/(2*z + ω_2*T + ω_2*T*z - 2)
(2*z + ω_1*T(1 + z) - 2)/(2*z + ω_2*T(1 + z) - 2)
# e)
H(z) := (z - 0.634)/(z - 0.3898)
